Simulations: Version=174
  DataStore
    ExcelInput Observed: FileNames=[Observed.xlsx]
      SheetNames=[ObservedProfileWater, ObservedResidues, ObservedLayerWater]
    PredictedObserved SoilWaterContents: PredictedTableName=Report; ObservedTableName=ObservedProfileWater; FieldNameUsedForMatch=SimulationName; FieldName2UsedForMatch=Clock.Today; AllColumns=false
      Tests: POName=SoilWaterContents
        AcceptedStats:
          {Name=MeasuredProfile, n=507, Slope=0.784681, Intercept=49.4962, SEslope=0.0195802, SEintercept=3.48567, R2=0.760781, RMSE=24.5562, NSE=0.679317, ME=12.3196, MAE=21.1431, RSR=0.56573}
        AcceptedStatsName=Name n Slope Intercept SEslope SEintercept R2 RMSE NSE ME MAE RSR
  Folder Replacements
    Report ReportWaterLayers: EventNames=[Clock].DoReport
      VariableNames:
        [Clock].Today
        [Soil].OutputLayers.SWmm
        [Soil].OutputLayers.SW
    Report ReportWaterBalance: EventNames=[Clock].DoReport
      VariableNames:
        [Clock].Today
        [Soil].WEIRDO.Drainage
        [Soil].WEIRDO.Infiltration
        [Soil].WEIRDO.Runoff
        [Soil].WEIRDO.Es
        [Soil].WEIRDO.WaterExtraction
        [Soil].WEIRDO.pond
        sum([Soil].WEIRDO.SWmm) as ProfileWater
    Report ReportCrop: EventNames=[Clock].DoReport
      VariableNames:
        [Clock].Today
        [Slurp].Leaf.CoverTotal
        [Slurp].Leaf.LAI
        [Slurp].Leaf.Height
        [Slurp].Root.LengthDensity
        [Slurp].Leaf.PotentialEP
        [Slurp].Root.Depth
    Report ReportMetVariables: EventNames=[Clock].DoReport
      VariableNames:
        [Clock].Today
        [IWeather].MaxT
        [IWeather].MinT
        [IWeather].Radn
        [IWeather].Rain
        [IWeather].VP
        [IWeather].Wind
        [Soil].WEIRDO.Eo
        [Soil].WEIRDO.Eos
  Folder Validation
    Experiment LandP
      Memo
        In this test we run Slurp against a dataset of Soil water content measured over 3 years under lucerne with different irrigation treatments applied.  Slurp was able to reproduce the tempeoral patterns of the 4 different irrigation treatments with adequate accuracy.
      Factors
        Factor Irrigation
          CompositeFactor TwoPerWeek
            Specifications:
              [IrrigationEvents]
              [SetCropVariables].Script.Irrigation = High
            Operations IrrigationEvents
              2011-11-07  [Irrigation].Apply(amount:30.0, duration:60.0);
              2011-11-25  [Irrigation].Apply(amount:13.6, duration:60.0);
              2011-11-28  [Irrigation].Apply(amount:20.1, duration:60.0);
              2011-11-29  [Irrigation].Apply(amount:16.4, duration:60.0);
              2011-12-05  [Irrigation].Apply(amount:27.0, duration:60.0);
              2011-12-15  [Irrigation].Apply(amount:8.0, duration:60.0);
              2011-12-26  [Irrigation].Apply(amount:22.5, duration:60.0);
              2011-12-29  [Irrigation].Apply(amount:16.5, duration:60.0);
              2012-01-05  [Irrigation].Apply(amount:22.8, duration:60.0);
              2012-01-09  [Irrigation].Apply(amount:17.8, duration:60.0);
              2012-01-12  [Irrigation].Apply(amount:9.1, duration:60.0);
              2012-01-16  [Irrigation].Apply(amount:18.3, duration:60.0);
              2012-01-19  [Irrigation].Apply(amount:18.6, duration:60.0);
              2012-01-23  [Irrigation].Apply(amount:22.5, duration:60.0);
              2012-01-30  [Irrigation].Apply(amount:8.0, duration:60.0);
              2012-02-02  [Irrigation].Apply(amount:12.0, duration:60.0);
              2012-02-07  [Irrigation].Apply(amount:16.5, duration:60.0);
              2012-02-09  [Irrigation].Apply(amount:13.3, duration:60.0);
              2012-02-13  [Irrigation].Apply(amount:12.2, duration:60.0);
              2012-02-20  [Irrigation].Apply(amount:13.3, duration:60.0);
              2012-02-23  [Irrigation].Apply(amount:8.8, duration:60.0);
              2012-03-29  [Irrigation].Apply(amount:10.0, duration:60.0);
              2012-04-02  [Irrigation].Apply(amount:6.5, duration:60.0);
              2012-04-05  [Irrigation].Apply(amount:5.0, duration:60.0);
              2012-04-10  [Irrigation].Apply(amount:6.9, duration:60.0);
              2012-04-26  [Irrigation].Apply(amount:4.6, duration:60.0);
              2012-04-30  [Irrigation].Apply(amount:6.9, duration:60.0);
              2012-05-03  [Irrigation].Apply(amount:3.2, duration:60.0);
              2012-11-01  [Irrigation].Apply(amount:18.0, duration:60.0);
              2012-11-15  [Irrigation].Apply(amount:12.0, duration:60.0);
              2012-11-22  [Irrigation].Apply(amount:12.0, duration:60.0);
              2012-11-26  [Irrigation].Apply(amount:12.0, duration:60.0);
              2012-11-29  [Irrigation].Apply(amount:12.0, duration:60.0);
              2012-12-03  [Irrigation].Apply(amount:6.0, duration:60.0);
              2012-12-06  [Irrigation].Apply(amount:12.0, duration:60.0);
              2012-12-13  [Irrigation].Apply(amount:12.0, duration:60.0);
              2012-12-17  [Irrigation].Apply(amount:20.8, duration:60.0);
              2012-12-20  [Irrigation].Apply(amount:12.0, duration:60.0);
              2012-12-24  [Irrigation].Apply(amount:12.0, duration:60.0);
              2012-12-27  [Irrigation].Apply(amount:9.0, duration:60.0);
              2012-12-31  [Irrigation].Apply(amount:12.0, duration:60.0);
              2013-01-03  [Irrigation].Apply(amount:12.0, duration:60.0);
              2013-01-07  [Irrigation].Apply(amount:18.0, duration:60.0);
              2013-01-10  [Irrigation].Apply(amount:18.0, duration:60.0);
              2013-01-14  [Irrigation].Apply(amount:21.0, duration:60.0);
              2013-01-21  [Irrigation].Apply(amount:15.0, duration:60.0);
              2013-01-24  [Irrigation].Apply(amount:15.0, duration:60.0);
              2013-01-28  [Irrigation].Apply(amount:15.0, duration:60.0);
              2013-01-31  [Irrigation].Apply(amount:15.0, duration:60.0);
              2013-02-04  [Irrigation].Apply(amount:18.0, duration:60.0);
              2013-02-07  [Irrigation].Apply(amount:6.0, duration:60.0);
              2013-02-11  [Irrigation].Apply(amount:18.7, duration:60.0);
              2013-02-14  [Irrigation].Apply(amount:13.5, duration:60.0);
              2013-02-18  [Irrigation].Apply(amount:15.0, duration:60.0);
              2013-02-21  [Irrigation].Apply(amount:15.0, duration:60.0);
              2013-02-25  [Irrigation].Apply(amount:15.0, duration:60.0);
              2013-02-28  [Irrigation].Apply(amount:32.0, duration:60.0);
              2013-03-07  [Irrigation].Apply(amount:12.0, duration:60.0);
              2013-03-11  [Irrigation].Apply(amount:9.0, duration:60.0);
              2013-03-14  [Irrigation].Apply(amount:9.0, duration:60.0);
              2013-03-28  [Irrigation].Apply(amount:18.0, duration:60.0);
              2013-04-04  [Irrigation].Apply(amount:9.0, duration:60.0);
              2013-04-11  [Irrigation].Apply(amount:9.0, duration:60.0);
              2013-10-24  [Irrigation].Apply(amount:9.0, duration:60.0);
              2013-10-31  [Irrigation].Apply(amount:15.0, duration:60.0);
              2013-11-04  [Irrigation].Apply(amount:6.0, duration:60.0);
              2013-11-07  [Irrigation].Apply(amount:9.0, duration:60.0);
              2013-11-11  [Irrigation].Apply(amount:9.0, duration:60.0);
              2013-11-14  [Irrigation].Apply(amount:9.0, duration:60.0);
              2013-11-18  [Irrigation].Apply(amount:12.0, duration:60.0);
              2013-11-21  [Irrigation].Apply(amount:12.0, duration:60.0);
              2013-11-25  [Irrigation].Apply(amount:9.0, duration:60.0);
              2013-12-02  [Irrigation].Apply(amount:9.0, duration:60.0);
              2013-12-05  [Irrigation].Apply(amount:12.0, duration:60.0);
              2013-12-09  [Irrigation].Apply(amount:6.0, duration:60.0);
              2013-12-12  [Irrigation].Apply(amount:11.0, duration:60.0);
              2013-12-17  [Irrigation].Apply(amount:15.0, duration:60.0);
              2013-12-23  [Irrigation].Apply(amount:7.0, duration:60.0);
              2014-01-06  [Irrigation].Apply(amount:14.0, duration:60.0);
              2014-01-09  [Irrigation].Apply(amount:12.6, duration:60.0);
              2014-01-13  [Irrigation].Apply(amount:15.7, duration:60.0);
              2014-01-16  [Irrigation].Apply(amount:14.7, duration:60.0);
              2014-01-20  [Irrigation].Apply(amount:17.5, duration:60.0);
              2014-01-23  [Irrigation].Apply(amount:7.5, duration:60.0);
              2014-01-30  [Irrigation].Apply(amount:10.0, duration:60.0);
              2014-02-03  [Irrigation].Apply(amount:12.0, duration:60.0);
              2014-02-05  [Irrigation].Apply(amount:10.0, duration:60.0);
              2014-02-10  [Irrigation].Apply(amount:9.0, duration:60.0);
              2014-02-17  [Irrigation].Apply(amount:10.0, duration:60.0);
              2014-02-20  [Irrigation].Apply(amount:10.0, duration:60.0);
          CompositeFactor ThreeWeekly
            Specifications:
              [IrrigationEvents]
              [SetCropVariables].Script.Irrigation = Low
            Operations IrrigationEvents
              2011-11-07  [Irrigation].Apply(amount:30.0, duration:60.0);
              2011-11-29  [Irrigation].Apply(amount:47.6, duration:60.0);
              2011-12-15  [Irrigation].Apply(amount:34.9, duration:60.0);
              2011-12-29  [Irrigation].Apply(amount:41.8, duration:60.0);
              2012-01-12  [Irrigation].Apply(amount:49.8, duration:60.0);
              2012-01-26  [Irrigation].Apply(amount:36.8, duration:60.0);
              2012-02-09  [Irrigation].Apply(amount:49.6, duration:60.0);
              2012-02-23  [Irrigation].Apply(amount:34.3, duration:60.0);
              2012-04-05  [Irrigation].Apply(amount:21.4, duration:60.0);
              2012-05-03  [Irrigation].Apply(amount:23.7, duration:60.0);
              2012-11-01  [Irrigation].Apply(amount:18.0, duration:60.0);
              2012-11-22  [Irrigation].Apply(amount:12.0, duration:60.0);
              2012-12-13  [Irrigation].Apply(amount:27.0, duration:60.0);
              2013-01-03  [Irrigation].Apply(amount:42.0, duration:60.0);
              2013-01-24  [Irrigation].Apply(amount:45.0, duration:60.0);
              2013-02-14  [Irrigation].Apply(amount:90.6, duration:60.0);
              2013-02-28  [Irrigation].Apply(amount:20.0, duration:60.0);
              2013-03-07  [Irrigation].Apply(amount:30.0, duration:60.0);
              2013-03-28  [Irrigation].Apply(amount:18.0, duration:60.0);
              2013-04-18  [Irrigation].Apply(amount:15.0, duration:60.0);
              2013-10-24  [Irrigation].Apply(amount:12.0, duration:60.0);
              2013-11-14  [Irrigation].Apply(amount:33.0, duration:60.0);
              2013-12-05  [Irrigation].Apply(amount:36.0, duration:60.0);
              2014-01-16  [Irrigation].Apply(amount:44.7, duration:60.0);
              2014-02-05  [Irrigation].Apply(amount:33.5, duration:60.0);
              2014-02-27  [Irrigation].Apply(amount:32.0, duration:60.0);
          CompositeFactor None
            Specifications:
              [IrrigationEvents]
              [SetCropVariables].Script.Irrigation = Rain
            Operations IrrigationEvents
              2013-02-28  [Irrigation].Apply(amount:20.0, duration:60.0);
      Simulation LandPBase
        Weather: FileName=%root%/Examples/WeatherFiles/NZ_Lincoln
        Clock: Start=2011-03-01; End=2014-05-01
        Summary
        SoilArbitrator Soil Arbitrator
        Zone Field: Area=1; Slope=0; AspectAngle=0; Altitude=50
          Soil Lismore: Latitude=0; Longitude=0
            WEIRDO: PrecipitationInterception=0; Salb=0.15; SubProfileConductance=20; WaterTableDepth=10; CalculateInfiltration=true; CalculateDrainage=true; ReportDetail=false; IncludeSorption=true; CalculateEvaporation=true; CalculateDiffusion=true; DiffusivityMultiplier=1; ExtractionMultiplier=10; ProfileWaterExtraction=0; TotalCover=0; ResidueWater=0; Hour=0; ReportLayer=0; TimeStep=0
              Thickness  CFlow  XFlow  PsiBub  MinRepellancyFactor  LowerRepellentWC  UpperRepellentWC
              75         0.07   3.9    -10     1                    0.5               0.8
              75         0.07   3.8    -10     1                    0.5               0.8
              150        0.07   3.7    -10     1                    0.5               0.8
              100        0.07   3.6    -10     1                    0.5               0.8
              200        0.07   3.9    -10     1                    0.5               0.8
              200        0.07   3.9    -10     1                    0.5               0.8
              200        0.07   3.9    -10     1                    0.5               0.8
              200        0.07   3.9    -10     1                    0.5               0.8
              200        0.07   3.9    -10     1                    0.5               0.8
              1000       0.07   3.9    -10     1                    0.5               0.8
            LayerStructure: Thickness=[25, 50, 75, 50, 50, 50, 50, 50, 50, 50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]
            MRSpline
            Evapotranspiration
            Chemical: Thickness=[100, 200, 300, 300, 300, 300]; PH=[6.6, 6.2, 5.7, 5.5, 5.5, 5.5]; PHUnits=Water
            Nutrient
            Organic: FOMCNRatio=30; CarbonUnits=Total
              Thickness  Carbon  SoilCNRatio  FBiom  FInert  FOM
              100        1.82    11.5         0.025  0.3     1243.93
              200        1.47    11.5         0.025  0.4     833.832
              300        1.2     11.5         0.015  0.75    457.617
              300        1.03    11.5         0.01   0.9     251.145
              300        0.47    11.5         0.01   0.96    137.831
              300        0.47    11.5         0.01   0.96    75.6435
            Water: Thickness=[75, 75, 150, 100, 200, 200, 200, 200, 200, 1000]; InitialValues=[0.37, 0.33, 0.32, 0.3, 0.15, 0.1, 0.1, 0.11, 0.12, 0.14]; InitialPAWmm=266.5; RelativeTo=LL15; FilledFromTop=false
            CERESSoilTemperature Temperature
            OutputLayers: Thickness=[150, 150, 100, 200, 200, 200, 200, 200, 200]
            Physical
              Thickness  BD   AirDry  LL15  DUL   SAT
              75         1.2  0.05    0.1   0.3   0.57
              75         1.2  0.05    0.1   0.3   0.48
              150        1.2  0.1     0.1   0.3   0.48
              100        1.2  0.1     0.1   0.3   0.44
              200        1.2  0.04    0.04  0.13  0.4
              200        1.2  0.04    0.04  0.09  0.38
              200        1.2  0.04    0.04  0.1   0.37
              200        1.2  0.04    0.04  0.1   0.38
              200        1.2  0.04    0.04  0.12  0.39
              1000       1.2  0.04    0.04  0.11  0.4
              SoilCrop SlurpSoil
                LL=[0.1, 0.1, 0.1, 0.1, 0.04, 0.04, 0.04, 0.04, 0.04, 0.04]
                KL=[0.06, 0.06, 0.05, 0.04, 0.04, 0.03, 0.02, 0.01, 0.01, 0.01]
                XF=[1, 1, 1, 1, 1, 1, 1, 1, 1, 1]
            Solute NO3: Thickness=[100, 200, 300, 300, 300, 300]; InitialValues=[180.833, 12.5, 1.38889, 1.38889, 0, 0]; InitialValuesUnits=ppm; WaterTableConcentration=0; D0=0; DepthConstant=0; MaxDepthSoluteAccessible=0; RunoffEffectivenessAtMovingSolute=0; MaxEffectiveRunoff=0
            Solute NH4: Thickness=[100, 200, 300, 300, 300, 300]; InitialValues=[0, 0, 0, 0, 0, 0]; InitialValuesUnits=ppm; WaterTableConcentration=0; D0=0; DepthConstant=0; MaxDepthSoluteAccessible=0; RunoffEffectivenessAtMovingSolute=0; MaxEffectiveRunoff=0
            Solute Urea: Thickness=[100, 200, 300, 300, 300, 300]; InitialValues=[0, 0, 0, 0, 0, 0]; InitialValuesUnits=kg/ha; WaterTableConcentration=0; D0=0; DepthConstant=0; MaxDepthSoluteAccessible=0; RunoffEffectivenessAtMovingSolute=0; MaxEffectiveRunoff=0
          Plant Slurp
          MicroClimate: a_interception=0; b_interception=1; c_interception=0; d_interception=0; SoilHeatFluxFraction=0.4; MinimumHeightDiffForNewLayer=0; NightInterceptionFraction=0.5; ReferenceHeight=2
          Irrigation
          Fertiliser
          SurfaceOrganicMatter surface organic matter: InitialResidueName=wheat; InitialResidueType=wheat; InitialResidueMass=2000; InitialStandingFraction=0; InitialCPR=0; InitialCNR=80
          Operations IrrigationEvents
          Manager SlurpSowingRule
            CultivarName = Lucerne
            InitialRootDepth = 15
            SowingDate = 2011-03-14
            StopRootDate = 2012-07-14
            MaxG = 0.007
            R50 = 175
```csharp
using Models.Soils;
using APSIM.Shared.Utilities;
using Models.PMF;
using Models.Core;
using System;
using Models.PMF.Organs;
        
namespace Models
{
    [Serializable] 
    [System.Xml.Serialization.XmlInclude(typeof(Model))]
    public class Script : Model
    {
        [Link] private Plant Slurp;
        [Link] private Clock Clock;
        [Link] private Zone zone;
        [Link(Type = LinkType.Path, Path = "[Slurp].Root")]
        private Root root;

        [Description("Cultivar")]
        public string CultivarName { get; set; }
        [Description("Initial Root Depth")]
        public double InitialRootDepth { get; set; }
        [Description("Sowing Date")]
        public DateTime SowingDate { get; set; }
        [Description("Stop Root Date")]
        public DateTime StopRootDate { get; set; }
        [Description("Maximum Stomatal Conductance")]
        public double MaxG { get; set; }
        [Description("Stomatal Radn response")]
        public double R50 { get; set; }
               
        [EventSubscribe("DoManagement")]
        private void OnDoManagement(object sender, EventArgs e)
        {
            if (Clock.Today.Date == SowingDate)
            {
                Slurp.Sow(cultivar: CultivarName, population: 1, depth: InitialRootDepth, rowSpacing: 150);
                object LeafPartFrac = 0.9;
                zone.Set("Slurp.Leaf.DMDemands.Structural.DMDemandFunction.PartitionFraction.FixedValue", LeafPartFrac);
                object RootPartFrac = 0.1;
                zone.Set("Slurp.Root.DMDemands.Structural.DMDemandFunction.PartitionFraction.FixedValue", RootPartFrac);
                object GMaxValue = MaxG;
                zone.Set("Slurp.Leaf.Gsmax350", GMaxValue); 
                object R50Value = R50; 
                zone.Set("Slurp.Leaf.R50", R50Value); 
            }
            //Potato.Sow(... Contains the following arguements:
            //Population  double  Optional  Seeds sowing/m2.  Default is zero
            //Cultivar    string  Required  "NameOfCultivar"
            //Depth       double  Optional  Depth (mm) seed sown.   Default is 100mm 
            //MaxCover    double  Optional  Proportion (0-1) of the ground row crop will cover.   Default is 1.0
            //BudNumber   double  Optional  Number of mainstems per seed sown.  Default is 1.0
            //RowSpacing  double  Optional  Spaceing (mm) between drill rows when crop is sown.  Default is 150mm
            //CropClass   string  Optional  Crop class to instantiate when crop is sown.  Default is "Plant"
            
            if (Clock.Today.Date == StopRootDate)
            {
                object LeafPartFrac = 0.4;
                zone.Set("Slurp.Leaf.DMDemands.Structural.DMDemandFunction.PartitionFraction.FixedValue", LeafPartFrac);
                object RootPartFrac = 0.6;
                zone.Set("Slurp.Root.DMDemands.Structural.DMDemandFunction.PartitionFraction.FixedValue", RootPartFrac);
            }
        }
    }
}
```
          Report ReportCrop: EventNames=[Clock].DoReport
          Manager SetCropVariables
            CoverFile = %root%\Tests\Validation\Slurp\ShallowSoilTest\CoverInterpolated.csv
            Ext_coef = 0.8
            MaximumHeight = 600
            Cover =
            Irrigation =
            Treatment =
            leaflai = 0
```csharp
using Models.Soils;
using System.Data;
using APSIM.Shared.Utilities;
using System.Xml.Serialization;
using Models;
using Models.PMF;
using System.Text;
using System.Collections.Generic;
using Models.Core;
using System;
using Newtonsoft.Json;

namespace Models
{
    [Serializable] 
    //[System.Xml.Serialization.XmlInclude(typeof(Model))]
    public class Script : Model
    {
        [Link] Plant SCRUM;
        [Link] Clock Clock;
        [Link] Zone zone;
        [Link] Simulation Simulation;
        
        [Description("File of Yields")]
        public string CoverFile { get; set; }
        [Description("Extinction coefficient")]
        public  double Ext_coef { get; set; }
        [Description("Maximum height of the crop at full cover")]
        public double MaximumHeight { get; set; }
        
        [JsonIgnore] private DataTable Covers { get; set; }

        public string Cover { get; set; }
        public string Irrigation { get; set; }
        public string Treatment { get; set; }
        
        private double CoverRead { get; set; }
        public double leaflai { get; private set; }
                
        [EventSubscribe("StartOfSimulation")]
        private void OnStartOfSimulation(object sender, EventArgs e)
        {
            
            Treatment = "Lucerne_" + Irrigation;
            
            string fullFileName = PathUtilities.GetAbsolutePath(CoverFile, Simulation.FileName);
            
            ApsimTextFile textFile = new ApsimTextFile();
            textFile.Open(fullFileName);
            Covers = textFile.ToTable();
            textFile.Close();
        }
        
        [EventSubscribe("StartOfDay")]
        private void OnStartOfDay(object sender, EventArgs e)
        {
            foreach (DataRow row in Covers.Rows)
            {
                DateTime TodayDate = Convert.ToDateTime(row["Date"]);
                if (TodayDate.Date == Clock.Today.Date)
                {
                    CoverRead = Convert.ToDouble(row[Treatment]);
                }
            }
        
            if ((bool)zone.Get("Slurp.IsAlive") == true)
            {
                //Only assign cover valuse if crop is emerged
                
                if (CoverRead == 1)
                    leaflai = Math.Log(0.01) / -Ext_coef;
                else
                {
                    if (CoverRead > 0)
                        leaflai = Math.Log(1 - CoverRead) / -Ext_coef;
                    else
                        leaflai = 0;
                }
                //Summary.WriteMessage(this, "LAI " + leaflai, MessageType.Diagnostic);
                object LAIResetValue = leaflai;
                zone.Set("Slurp.Leaf.Area.FixedValue", LAIResetValue);  
                object HeightResetValue = CoverRead * MaximumHeight;
                zone.Set("Slurp.Leaf.HeightFunction.FixedValue", HeightResetValue);  
            }
        }
    }
}
```
          Report ReportWaterLayers: EventNames=[Clock].DoReport
          Report ReportWaterBalance: EventNames=[Clock].DoReport
          Report
            VariableNames:
              [Clock].Today
              sum([Soil].WEIRDO.SWmm) as MeasuredProfile
              [Soil].OutputLayers.SW
            EventNames:
              [Clock].DoReport
          Report ReporAllLayers: EventNames=[Clock].DoReport
            VariableNames:
              [Soil].WEIRDO.SW
              [Clock].Today
          Manager ClimateControl
            StartDate = 2011-10-18
            EndDate = 2011-10-20
```csharp
using Models.Soils;
using System.Xml.Serialization;
using Models;
using Models.PMF;
using System.Text;
using System.Collections.Generic;
using APSIM.Shared.Utilities;
using Models.Core;
using System;
using Models.Climate;

namespace Models
{
    [Serializable] 
    [System.Xml.Serialization.XmlInclude(typeof(Model))]
    public class Script : Model
    {
        [Link] Weather Met;
        [Link] Clock Clock;
    
        [Description("Start Date")]
        public DateTime StartDate { get; set; }
        
        [Description("End Date")]
        public DateTime EndDate { get; set; }
 
    
        [EventSubscribe("PreparingNewWeatherData")]
        private void OnPreparingNewWeatherData(object sender, EventArgs e)
        {
            if ((Clock.Today.Date >= StartDate) && (Clock.Today.Date <= EndDate))
                Met.Rain = 0;        
        }
    }
}
```
    Experiment Residues
      Factors
        Factor Cover
          CompositeFactor HarvesterWindrow
            Specifications:
              [SurfaceOrganicMatter]
              [Water].Thickness=50,150,200,200,200,200,200,200
              [Water].InitialValues=0.22,0.26,0.16,0.15,0.18,0.14,0.14,0.14
            SurfaceOrganicMatter: InitialResidueName=Barley; InitialResidueType=Barley; InitialResidueMass=7000; InitialStandingFraction=0; InitialCPR=0; InitialCNR=80
          CompositeFactor BareSoil
            Specifications:
              [SurfaceOrganicMatter]
              [Water].Thickness=50,150,200,200,200,200,200,200
              [Water].InitialValues=0.22,0.27,0.16,0.12,0.18,0.14,0.14,0.14
            SurfaceOrganicMatter: InitialResidueName=Barley; InitialResidueType=Barley; InitialResidueMass=0; InitialStandingFraction=1; InitialCPR=0; InitialCNR=80
      Simulation Base
        Weather: FileName=lincoln.met
        Clock: Start=2010-02-25; End=2010-08-11
        Summary
        Zone Field: Area=1; Slope=0; AspectAngle=0; Altitude=50
          Soil: ASCOrder=Vertosol; ASCSubOrder=Black; SoilType=Clay; Site=Norwin; NearestTown=Norwin; Region=Darling Downs and Granite Belt; State=Queensland; Country=Australia; NaturalVegetation=Qld. Bluegrass, possible Qld. Blue gum; ApsoilNumber=900; Latitude=-27.581836; Longitude=151.320206; LocationAccuracy=+/- 20m
            DataSource=CSIRO Sustainable Ecosystems, Toowoomba; Characteriesd as part of the GRDC funded project"Doing it better, doing it smarter, managing soil water in Australian agriculture' 2011
            Comments=OC, CLL for all crops estimated-based on Bongeen Mywybilla Soil No1
            WEIRDO: PrecipitationInterception=0; Salb=0.15; SubProfileConductance=20; WaterTableDepth=10; CalculateInfiltration=true; CalculateDrainage=true; ReportDetail=false; IncludeSorption=true; CalculateEvaporation=true; CalculateDiffusion=true; DiffusivityMultiplier=1; ExtractionMultiplier=0; ProfileWaterExtraction=0; TotalCover=0; ResidueWater=0; Hour=0; ReportLayer=0; TimeStep=0
              Thickness  CFlow  XFlow  PsiBub  MinRepellancyFactor  LowerRepellentWC  UpperRepellentWC
              200        4      3.2    -30     0                    0.5               0.8
              200        12     3      -30     0                    0.5               0.8
              200        4      3.2    -30     1                    0.5               0.8
              200        0.006  3      -30     1                    0.5               0.8
              600        0.06   3.9    -20     1                    0.5               0.8
            Evapotranspiration
            MRSpline
            Nutrient
            Organic: FOMCNRatio=40; CarbonUnits=Total
              Thickness  Carbon  SoilCNRatio  FBiom  FInert  FOM
              200        2.63    11           0.03   0.4     366.824
              200        1.25    11           0.02   0.7     238.964
              200        0.32    11           0.01   0.8     155.67
              200        0.21    11           0.01   0.9     101.41
              200        0.2     11           0.01   1       66.0622
              200        0.2     11           0.01   1       43.0355
              200        0.2     11           0.01   1       28.035
            Chemical: Thickness=[200, 200, 200, 200, 200, 200, 200]; PH=[6, 6, 6, 6, 6, 6, 6]; PHUnits=Water
            Water: Thickness=[50, 150, 200, 200, 200, 200, 200, 200]; InitialValues=[0.27, 0.27, 0.25, 0.3, 0.25, 0.25, 0.25, 0.25]; InitialPAWmm=170; RelativeTo=LL15; FilledFromTop=false
            LayerStructure
              Thickness=[25, 25, 50, 50, 50, 50, 50, 50, 50, 50, 50, 50, 50, 50, 50, 50, 50, 50, 50, 50, 50, 50, 50, 50, 50, 50, 50, 50, 50]
            OutputLayers: Thickness=[200, 200, 200, 200, 200, 200, 200]
            CERESSoilTemperature Temperature
            Physical
              Thickness  BD   LL15  DUL   SAT
              200        1    0.16  0.3   0.44
              200        1.2  0.15  0.28  0.46
              200        1.2  0.12  0.28  0.46
              200        1.2  0.18  0.36  0.42
              600        1.2  0.12  0.28  0.46
            Solute NO3: Thickness=[200, 200, 200, 200, 200, 200, 200]; InitialValues=[10, 10, 10, 10, 10, 10, 1]; InitialValuesUnits=ppm; WaterTableConcentration=0; D0=0; DepthConstant=0; MaxDepthSoluteAccessible=0; RunoffEffectivenessAtMovingSolute=0; MaxEffectiveRunoff=0
            Solute NH4: Thickness=[200, 200, 200, 200, 200, 200, 200]; InitialValues=[0.1, 0.1, 0.1, 0.1, 0.1, 0.1, 0.1]; InitialValuesUnits=ppm; WaterTableConcentration=0; D0=0; DepthConstant=0; MaxDepthSoluteAccessible=0; RunoffEffectivenessAtMovingSolute=0; MaxEffectiveRunoff=0
            Solute Urea: Thickness=[200, 200, 200, 200, 200, 200, 200]; InitialValues=[0, 0, 0, 0, 0, 0, 0]; InitialValuesUnits=kg/ha; WaterTableConcentration=0; D0=0; DepthConstant=0; MaxDepthSoluteAccessible=0; RunoffEffectivenessAtMovingSolute=0; MaxEffectiveRunoff=0
          Irrigation
          Fertiliser
          SurfaceOrganicMatter: InitialResidueName=Barley; InitialResidueType=Barley; InitialResidueMass=2026; InitialStandingFraction=1; InitialCPR=0; InitialCNR=80
          MicroClimate: a_interception=0; b_interception=1; c_interception=0; d_interception=0; SoilHeatFluxFraction=0.4; MinimumHeightDiffForNewLayer=0; NightInterceptionFraction=0.5; ReferenceHeight=2
          Report
            VariableNames:
              [Clock].Today
              [SurfaceOrganicMatter].Cover
              [SurfaceOrganicMatter].Wt
              sum([Soil].WEIRDO.SWmm[1:13]) as MeasuredProfile
              [Soil].OutputLayers.SWmm
              [Soil].OutputLayers.SW
              [Soil].WEIRDO.PoreWater
            EventNames:
              [Clock].DoReport
          Operations
            2010-03-05  [Irrigation].Apply(amount: 26.6,duration: 0.5);
            2010-03-08  [Irrigation].Apply(amount: 30.4,duration: 0.5);
            2010-03-09  [Irrigation].Apply(amount: 50,duration: 0.8);
          Manager ExtraVariables
```csharp
using Newtonsoft.Json;
using Models.Climate;
using APSIM.Shared.Utilities;
using System.Xml.Serialization;
using Models;
using Models.Soils;
using Models.Soils.Nutrients;
using System.Text;
using System.Collections.Generic;
using Models.Core;
using System;
using Models.Interfaces;
using Models.Soils.Nutrients;

namespace Models
{
    [Serializable] 
    public class Script : Model
    {
        [Link] private Clock Clock;
        [Link] private Weather Met;
        [Link] private Fertiliser Fert;
        [Link] private Irrigation Irrig;
        [Link(ByName = true)]
        private ISolute Urea;
        [Link(ByName = true)]
        private ISolute NO3;
        [Link(ByName = true)]
        private ISolute NH4;
        [Link]
        private Nutrient SoilNitrogen;
        [Link] private Soils.Soil Soil;
        [Link] private Models.Surface.SurfaceOrganicMatter SOM;
        [Link]
        private IPhysical soilPhysical;
        [Link]
        private ISoilWater waterBalance;
        [Link(Type=LinkType.Path, Path="[SurfaceOrganicMatter].SurfaceResidue.Decomposition")] private OrganicFlow SurfaceDecomposition;
        [Link]
        private Nutrient Nutrient;
        [Link(Path="[SurfaceOrganicMatter].SurfaceResidue.Decomposition")]
        private OrganicFlow ResidueDecomposition;
        [JsonIgnore] public bool InitialDay { get; set; }
        
        [JsonIgnore] public double AccumPlantN { get; set; }
        [JsonIgnore] public double AccumMineralisation { get; set; }
        [JsonIgnore] public double AccumDenit { get; set; }
        [JsonIgnore] public double AccumFert { get; set; }
        [JsonIgnore] public double AccumLeach { get; set; }
        [JsonIgnore] public double AccumDetach { get; set; }
        [JsonIgnore] public double DeltaSoilOMN { get; set; }
        [JsonIgnore] public double DeltaSurfaceOMN { get; set; }
        [JsonIgnore] public double DeltaSoilMineralN { get; set; }
        [JsonIgnore] public double SoilNitrogenContent { get; set; }
        
        [JsonIgnore] public double AccumEO { get; set; }
        [JsonIgnore] public double AccumEP { get; set; }
        [JsonIgnore] public double AccumES { get; set; }
        [JsonIgnore] public double AccumDrainage { get; set; }
        [JsonIgnore] public double AccumRunoff { get; set; }
        [JsonIgnore] public double AccumOutflowLat { get; set; }
        [JsonIgnore] public double AccumIrrigation { get; set; }
        [JsonIgnore] public double AccumRainfall { get; set; }
        [JsonIgnore] public double SoilWaterDeficit { get; set; }
        
        [JsonIgnore] public double AccumTtemerg { get; set; }
        
        [JsonIgnore] public double  InitialSoilOMN { get; set; }
        [JsonIgnore] public double  InitialSurfaceOMN { get; set; }
        [JsonIgnore] public double  InitialMineralN { get; set; }
        
        [JsonIgnore] public double SWC { get; set; }
        [JsonIgnore] public double DUL { get; set; }
        [JsonIgnore] public double OutFlowLat { get; set; }
        [JsonIgnore] public double SWDep60 { get; set; }
        [JsonIgnore] public double Flux1 { get; set; }
        [JsonIgnore] public double Flux3 { get; set; }
        
        [JsonIgnore] public double FomN { get; set; }
        [JsonIgnore] public double BiomN { get; set; }
        [JsonIgnore] public double HumN { get; set; }
        [JsonIgnore] public double OrganicN { get; set; }
        [JsonIgnore] public double NO3N { get; set; }
        [JsonIgnore] public double NH4N { get; set; }
        [JsonIgnore] public double UreaN { get; set; }
        [JsonIgnore] public double MineralN { get; set; }
        [JsonIgnore] public double DltNMinRes { get; set; }
        [JsonIgnore] public double DltNMinTot { get; set; }
        
        [EventSubscribe("StartOfSimulation")]
        private void OnSimulationCommencing(object sender, EventArgs e)
        {
            InitialDay = true;
        }
        
        [EventSubscribe("DoManagement")]
        private void OnDoManagement(object sender, EventArgs e)
        {
            //!!!!!! Nitrogen balance components !!!!!!
            //!!!!!!^^^^^^^^^^^^^^^^^^^^^^^^^^^^^!!!!!!
            FomN = MathUtilities.Sum(SoilNitrogen.FOM.N);
            HumN = MathUtilities.Sum(SoilNitrogen.Humic.N);
            BiomN = MathUtilities.Sum(SoilNitrogen.Microbial.N);
            OrganicN = FomN + HumN + BiomN;
            NO3N = MathUtilities.Sum(NO3.kgha);
            NH4N = MathUtilities.Sum(NH4.kgha);
            UreaN = MathUtilities.Sum(Urea.kgha);
            MineralN = NO3N + NH4N + UreaN; 
            DltNMinRes = MathUtilities.Sum(SurfaceDecomposition.MineralisedN);
            DltNMinTot = MathUtilities.Sum(Nutrient.MineralisedN);
            int layers = soilPhysical.Thickness.Length;
            if (InitialDay == true)
            {
                InitialSurfaceOMN = SOM.N;
                InitialSoilOMN = OrganicN;
                InitialMineralN = MineralN;
                InitialDay = false;
            }
            AccumFert += Fert.NitrogenApplied;
            DeltaSurfaceOMN = SOM.N - InitialSurfaceOMN;
            AccumLeach = AccumLeach - waterBalance.LeachNH4 - waterBalance.LeachNO3 - waterBalance.LeachUrea; //Fails
            AccumMineralisation += MathUtilities.Sum(Nutrient.MineralisedN);
            AccumDenit -= MathUtilities.Sum(SoilNitrogen.DenitrifiedN);
            DeltaSoilOMN = OrganicN - InitialSoilOMN;
            DeltaSoilMineralN = MineralN - InitialMineralN;
            SoilNitrogenContent = MineralN;
            
            //!!!!!! Water balance components !!!!!!
            //!!!!!!^^^^^^^^^^^^^^^^^^^^^^^^^^!!!!!!

            AccumIrrigation += Irrig.IrrigationApplied; 
            AccumRainfall += Met.Rain;
            SWDep60 = 0;
            SWC = MathUtilities.Sum(waterBalance.SWmm);
            DUL = MathUtilities.Sum(soilPhysical.DULmm);
            SoilWaterDeficit = (SWC - DUL);
            double OutFlowLat = MathUtilities.Sum(waterBalance.LateralOutflow);
            AccumOutflowLat -= OutFlowLat;
            SWDep60 = waterBalance.SWmm[0] + waterBalance.SWmm[1] + waterBalance.SWmm[2];
        }
        
        [EventSubscribe("DoManagementCalculations")]
        private void OnDoManagementCalculations(object sender, EventArgs e)
        {
            int layers = soilPhysical.Thickness.Length;            
            AccumEO -= waterBalance.Eo;
            AccumES -= waterBalance.Es; 
            AccumDrainage -= waterBalance.Drainage;
            AccumRunoff -= waterBalance.Runoff;
        }
    }
}
```
          Report ReportWaterLayers: EventNames=[Clock].DoReport
          Report ReportWaterBalance: EventNames=[Clock].DoReport
          Report ReportMetVariables: EventNames=[Clock].DoReport
  Folder Sensibility
    Experiment Transpiration
      Factors
        Factor Texture
          CompositeFactor Silt: Specifications=[WEIRDO]
            WEIRDO: PrecipitationInterception=0; Depth=[0-1400]; Salb=0.15; Thickness=[1400]; CFlow=[0.9]; XFlow=[3.5]; PsiBub=[-20]; MinRepellancyFactor=[0]; LowerRepellentWC=[0.5]; UpperRepellentWC=[0.8]; SubProfileConductance=100; WaterTableDepth=10; CalculateInfiltration=true; CalculateDrainage=true; ReportDetail=false; IncludeSorption=true; CalculateEvaporation=false; CalculateDiffusion=true; DiffusivityMultiplier=1; ExtractionMultiplier=1000; ProfileWaterExtraction=0; TotalCover=0; ResidueWater=0; Hour=0; ReportLayer=0; TimeStep=0
          CompositeFactor Sand: Specifications=[WEIRDO]
            WEIRDO: PrecipitationInterception=0; Depth=[0-1400]; Salb=0.15; Thickness=[1400]; CFlow=[0.1]; XFlow=[4.1]; PsiBub=[-20]; MinRepellancyFactor=[0]; LowerRepellentWC=[0.5]; UpperRepellentWC=[0.8]; SubProfileConductance=100; WaterTableDepth=10; CalculateInfiltration=true; CalculateDrainage=true; ReportDetail=false; IncludeSorption=true; CalculateEvaporation=false; CalculateDiffusion=true; DiffusivityMultiplier=1; ExtractionMultiplier=10; ProfileWaterExtraction=0; TotalCover=0; ResidueWater=0; Hour=0; ReportLayer=0; TimeStep=0
          CompositeFactor Loam: Specifications=[WEIRDO]
            WEIRDO: PrecipitationInterception=0; Depth=[0-1400]; Salb=0.15; Thickness=[1400]; CFlow=[0.09]; XFlow=[3]; PsiBub=[-20]; MinRepellancyFactor=[0]; LowerRepellentWC=[0.5]; UpperRepellentWC=[0.8]; SubProfileConductance=100; WaterTableDepth=10; CalculateInfiltration=true; CalculateDrainage=true; ReportDetail=false; IncludeSorption=true; CalculateEvaporation=false; CalculateDiffusion=true; DiffusivityMultiplier=1; ExtractionMultiplier=10; ProfileWaterExtraction=0; TotalCover=0; ResidueWater=0; Hour=0; ReportLayer=0; TimeStep=0
      Simulation BaseTranspiration
        Clock: Start=1998-09-01; End=1999-08-29
        Weather: FileName=lincoln.met
        Summary SummaryFile
        SoilArbitrator Soil Arbitrator
        Zone Field: Area=1; Slope=0; AspectAngle=0; Altitude=50
          Fertiliser
          SurfaceOrganicMatter: InitialResidueName=wheat_stubble; InitialResidueType=wheat; InitialResidueMass=0; InitialStandingFraction=0; InitialCPR=0; InitialCNR=100
          MicroClimate: a_interception=0; b_interception=1; c_interception=0; d_interception=0; SoilHeatFluxFraction=0.4; MinimumHeightDiffForNewLayer=0; NightInterceptionFraction=0.5; ReferenceHeight=2
          Irrigation
          Manager ClimateControl
```csharp
using Models.Soils;
using System.Xml.Serialization;
using Models;
using Models.PMF;
using System.Text;
using System.Collections.Generic;
using APSIM.Shared.Utilities;
using Models.Core;
using System;
using Models.Climate;

namespace Models
{
    [Serializable] 
    [System.Xml.Serialization.XmlInclude(typeof(Model))]
    public class Script : Model
    {
        [Link] Weather Met;
        [Link] Clock Clock;
    
        [EventSubscribe("PreparingNewWeatherData")]
        private void OnPreparingNewWeatherData(object sender, EventArgs e)
        {
            Met.Rain = 0;    
            Met.MaxT = 25;
            Met.MinT = 15;
            Met.Radn = 20;
            Met.VP = 10;
            Met.Wind = 5;
        }
    }
}
```
          Plant Slurp
          Manager SlurpSowingRule
            CultivarName = Pasture
            InitialRootDepth = 20
            SowDate = 1-Oct
```csharp
using Models.Soils;
using APSIM.Shared.Utilities;
using Models.PMF;
using Models.Core;
using System;
using Models.PMF.Organs;
        
namespace Models
{
    [Serializable] 
    [System.Xml.Serialization.XmlInclude(typeof(Model))]
    public class Script : Model
    {
        [Link] private Plant Slurp;
        [Link] private Clock Clock;
        [Link] private Zone zone;
        [Link(Type = LinkType.Path, Path = "[Slurp].Root")]
        private Root root;
        [Display(Type=DisplayType.CultivarName)]
        [Description("Cultivar")]
        public string CultivarName { get; set; }
        [Description("Initial Root Depth")]
        public double InitialRootDepth { get; set; }
        [Description("Sowing date (d-mmm)")]
        public string SowDate { get; set; }

               
        [EventSubscribe("DoManagement")]
        private void OnDoManagement(object sender, EventArgs e)
        {
            if (DateUtilities.WithinDates(SowDate, Clock.Today, SowDate))
            {
                Slurp.Sow(cultivar: CultivarName, population: 1, depth: InitialRootDepth, rowSpacing: 150);
                object LeafPartFrac = 0.2;
                zone.Set("Slurp.Leaf.DMDemands.Structural.DMDemandFunction.PartitionFraction.FixedValue", LeafPartFrac);
                object RootPartFrac = 0.8;
                zone.Set("Slurp.Root.DMDemands.Structural.DMDemandFunction.PartitionFraction.FixedValue", RootPartFrac);
            }
            //Potato.Sow(... Contains the following arguements:
            //Population  double  Optional  Seeds sowing/m2.  Default is zero
            //Cultivar    string  Required  "NameOfCultivar"
            //Depth       double  Optional  Depth (mm) seed sown.   Default is 100mm 
            //MaxCover    double  Optional  Proportion (0-1) of the ground row crop will cover.   Default is 1.0
            //BudNumber   double  Optional  Number of mainstems per seed sown.  Default is 1.0
            //RowSpacing  double  Optional  Spaceing (mm) between drill rows when crop is sown.  Default is 150mm
            //CropClass   string  Optional  Crop class to instantiate when crop is sown.  Default is "Plant"
        }
    }
}
```
          Soil: ASCOrder=Vertosol; ASCSubOrder=Black; SoilType=Clay; Site=Norwin; NearestTown=Norwin; Region=Darling Downs and Granite Belt; State=Queensland; Country=Australia; NaturalVegetation=Qld. Bluegrass, possible Qld. Blue gum; ApsoilNumber=900; Latitude=-27.581836; Longitude=151.320206; LocationAccuracy=+/- 20m
            DataSource=CSIRO Sustainable Ecosystems, Toowoomba; Characteriesd as part of the GRDC funded project"Doing it better, doing it smarter, managing soil water in Australian agriculture' 2011
            Comments=OC, CLL for all crops estimated-based on Bongeen Mywybilla Soil No1
            WEIRDO: PrecipitationInterception=0; Salb=0.15; SubProfileConductance=20; WaterTableDepth=10; CalculateInfiltration=true; CalculateDrainage=true; ReportDetail=false; IncludeSorption=true; CalculateEvaporation=false; CalculateDiffusion=false; DiffusivityMultiplier=2; ExtractionMultiplier=0; ProfileWaterExtraction=0; TotalCover=0; ResidueWater=0; Hour=0; ReportLayer=0; TimeStep=0
              Thickness  CFlow  XFlow  PsiBub  MinRepellancyFactor  LowerRepellentWC  UpperRepellentWC
              30         7e-11  3      -20     1                    0.2               0.8
              170        7e-11  3      -20     1                    0.2               0.8
              200        7e-11  3      -70     1                    0.2               0.8
              200        7e-11  3      -70     1                    0.2               0.8
              200        7e-11  3      -70     1                    0.2               0.8
              200        7e-11  3      -70     1                    0.2               0.8
              200        7e-11  3      -70     1                    0.2               0.8
              200        7e-11  3      -70     1                    0.2               0.8
            Evapotranspiration
            MRSpline
            Nutrient
            Organic: same as Validation.Residues.Base.Field.Soil.Organic
            Chemical: Thickness=[200, 200, 200, 200, 200, 200, 200]; PH=[6, 6, 6, 6, 6, 6, 6]; PHUnits=Water
            Water: Thickness=[30, 170, 200, 200, 200, 200, 200, 200]; InitialValues=[0.3, 0.3, 0.28, 0.28, 0.26, 0.26, 0.26, 0.26]; InitialPAWmm=181.7; RelativeTo=LL15; FilledFromTop=false
            LayerStructure
              Thickness=[25, 25, 50, 50, 50, 50, 50, 50, 50, 50, 50, 50, 50, 50, 50, 50, 50, 50, 50, 50, 50, 50, 50, 50, 50, 50, 50, 50, 50]
            OutputLayers: Thickness=[200, 200, 200, 200, 200, 200, 200]
            CERESSoilTemperature Temperature
            Physical
              Thickness  BD   AirDry  LL15  DUL   SAT
              30         1    0.08    0.16  0.3   0.44
              170        1    0.08    0.15  0.3   0.44
              200        1.2  0.14    0.14  0.28  0.46
              200        1.2  0.14    0.14  0.28  0.46
              200        1.3  0.14    0.14  0.26  0.36
              200        1.4  0.14    0.14  0.26  0.36
              200        1.5  0.14    0.14  0.26  0.36
              200        1.6  0.14    0.14  0.26  0.36
              SoilCrop SlurpSoil: LL=[0.16, 0.15, 0.14, 0.14, 0.14, 0.14, 0.14, 0.14]; KL=[0.1, 0.1, 0.06, 0.05, 0.03, 0.01, 0.01, 0.01]; XF=[1, 1, 1, 1, 1, 1, 1, 1]
            Solute NO3: same as Validation.Residues.Base.Field.Soil.NO3
            Solute NH4: same as Validation.Residues.Base.Field.Soil.NH4
            Solute Urea: same as Validation.Residues.Base.Field.Soil.Urea
          Report ReportWaterLayers: EventNames=[Clock].DoReport
          Report ReportWaterBalance: EventNames=[Clock].DoReport
          Report ReportCrop: EventNames=[Clock].DoReport
          Report
            VariableNames:
              [Clock].Today
              [Soil].WEIRDO.PoreWater
              [Soil].WEIRDO.Eos
            EventNames:
              [Clock].DoReport
          Report ReporAllLayers: EventNames=[Clock].DoReport
            VariableNames:
              [Soil].WEIRDO.SW
              [Clock].Today
    Experiment Diffusion
      Factors
        Permutation
          Factor WetLayer
            CompositeFactor WetTop
              Specifications:
                [Water].Thickness=800,800
                [Water].InitialValues=0.3,0.15
            CompositeFactor WetBot
              Specifications:
                [Water].Thickness=800,800
                [Water].InitialValues=0.15,0.3
          Factor Texture
            CompositeFactor Silt: Specifications=[WEIRDO]
              WEIRDO: PrecipitationInterception=0; Depth=[0-1600]; Salb=0.15; Thickness=[1600]; CFlow=[0.9]; XFlow=[3.5]; PsiBub=[-20]; MinRepellancyFactor=[1]; LowerRepellentWC=[0.2]; UpperRepellentWC=[0.8]; SubProfileConductance=100; WaterTableDepth=10; CalculateInfiltration=true; CalculateDrainage=true; ReportDetail=false; IncludeSorption=true; CalculateEvaporation=false; CalculateDiffusion=true; DiffusivityMultiplier=1; ExtractionMultiplier=0; ProfileWaterExtraction=0; TotalCover=0; ResidueWater=0; Hour=0; ReportLayer=0; TimeStep=0
            CompositeFactor Sand: Specifications=[WEIRDO]
              WEIRDO: PrecipitationInterception=0; Depth=[0-1600]; Salb=0.15; Thickness=[1600]; CFlow=[0.1]; XFlow=[4.1]; PsiBub=[-20]; MinRepellancyFactor=[1]; LowerRepellentWC=[0.2]; UpperRepellentWC=[0.8]; SubProfileConductance=100; WaterTableDepth=10; CalculateInfiltration=true; CalculateDrainage=true; ReportDetail=false; IncludeSorption=true; CalculateEvaporation=false; CalculateDiffusion=true; DiffusivityMultiplier=1; ExtractionMultiplier=0; ProfileWaterExtraction=0; TotalCover=0; ResidueWater=0; Hour=0; ReportLayer=0; TimeStep=0
            CompositeFactor Loam: Specifications=[WEIRDO]
              WEIRDO: PrecipitationInterception=0; Depth=[0-1600]; Salb=0.15; Thickness=[1600]; CFlow=[0.09]; XFlow=[3]; PsiBub=[-20]; MinRepellancyFactor=[1]; LowerRepellentWC=[0.2]; UpperRepellentWC=[0.8]; SubProfileConductance=100; WaterTableDepth=10; CalculateInfiltration=true; CalculateDrainage=true; ReportDetail=false; IncludeSorption=true; CalculateEvaporation=false; CalculateDiffusion=true; DiffusivityMultiplier=1; ExtractionMultiplier=0; ProfileWaterExtraction=0; TotalCover=0; ResidueWater=0; Hour=0; ReportLayer=0; TimeStep=0
      Simulation BaseDiffuse
        Clock: Start=1999-01-01; End=1999-12-31
        Weather: FileName=lincoln.met
        Summary SummaryFile
        Zone Field: Area=1; Slope=0; AspectAngle=0; Altitude=50
          Fertiliser
          SurfaceOrganicMatter: InitialResidueName=wheat_stubble; InitialResidueType=wheat; InitialResidueMass=0; InitialStandingFraction=0; InitialCPR=0; InitialCNR=100
          MicroClimate: a_interception=0; b_interception=1; c_interception=0; d_interception=0; SoilHeatFluxFraction=0.4; MinimumHeightDiffForNewLayer=0; NightInterceptionFraction=0.5; ReferenceHeight=2
          Irrigation
          Manager ClimateControl
```csharp
using Models.Soils;
using System.Xml.Serialization;
using Models;
using Models.PMF;
using System.Text;
using System.Collections.Generic;
using APSIM.Shared.Utilities;
using Models.Core;
using System;
using Models.Climate;

namespace Models
{
    [Serializable] 
    [System.Xml.Serialization.XmlInclude(typeof(Model))]
    public class Script : Model
    {
        [Link] Weather Met;
        [Link] Clock Clock;
    
        [EventSubscribe("PreparingNewWeatherData")]
        private void OnPreparingNewWeatherData(object sender, EventArgs e)
        {
            Met.Rain = 0;    
            Met.MaxT = 15;
            Met.MinT = 5;
            Met.Radn = 10;
            Met.VP = 5;
            Met.Wind = 1;
        }
    }
}
```
          Soil: ASCOrder=Vertosol; ASCSubOrder=Black; SoilType=Clay; Site=Norwin; NearestTown=Norwin; Region=Darling Downs and Granite Belt; State=Queensland; Country=Australia; NaturalVegetation=Qld. Bluegrass, possible Qld. Blue gum; ApsoilNumber=900; Latitude=-27.581836; Longitude=151.320206; LocationAccuracy=+/- 20m
            DataSource=CSIRO Sustainable Ecosystems, Toowoomba; Characteriesd as part of the GRDC funded project"Doing it better, doing it smarter, managing soil water in Australian agriculture' 2011
            Comments=OC, CLL for all crops estimated-based on Bongeen Mywybilla Soil No1
            WEIRDO: same as Sensibility.Diffusion.Factors.Permutation.Texture.Silt.WEIRDO
            Evapotranspiration
            MRSpline
            Nutrient
            Organic: same as Validation.Residues.Base.Field.Soil.Organic
            Chemical: Thickness=[200, 200, 200, 200, 200, 200, 200]; PH=[6, 6, 6, 6, 6, 6, 6]; PHUnits=Water
            Water: Thickness=[30, 170, 200, 200, 200, 200, 200, 200]; InitialValues=[0.44, 0.44, 0.46, 0.46, 0.36, 0.36, 0.36, 0.36]; InitialPAWmm=350; RelativeTo=LL15; FilledFromTop=false
            OutputLayers: Thickness=[200, 200, 200, 200, 200, 200, 200, 200]
            LayerStructure: Thickness=[25, 25, 50, 50, 50, 50, 50, 50, 50, 50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]
            CERESSoilTemperature Temperature
            Physical
              Thickness  BD   LL15  DUL  SAT
              30         1    0.15  0.3  0.44
              170        1    0.15  0.3  0.44
              200        1.2  0.15  0.3  0.46
              200        1.2  0.15  0.3  0.46
              200        1.3  0.15  0.3  0.36
              200        1.4  0.15  0.3  0.36
              200        1.5  0.15  0.3  0.36
              200        1.6  0.15  0.3  0.36
            Solute NO3: same as Validation.Residues.Base.Field.Soil.NO3
            Solute NH4: same as Validation.Residues.Base.Field.Soil.NH4
            Solute Urea: same as Validation.Residues.Base.Field.Soil.Urea
          Report ReportWaterLayers: EventNames=[Clock].DoReport
          Report ReportWaterBalance: EventNames=[Clock].DoReport
          Report: EventNames=[Clock].DoReport
            VariableNames:
              [Clock].Today
              sum([Soil].OutputLayers.SWmm[1:4]) as TopWater
              sum([Soil].OutputLayers.SWmm[5:8]) as BotWater
    Experiment Drainage
      Factors
        Factor Texture
          CompositeFactor Silt: Specifications=[WEIRDO]
            WEIRDO: PrecipitationInterception=0; Depth=[0-1400]; Salb=0.15; Thickness=[1400]; CFlow=[0.9]; XFlow=[3.5]; PsiBub=[-20]; MinRepellancyFactor=[1]; LowerRepellentWC=[0.2]; UpperRepellentWC=[0.8]; SubProfileConductance=100; WaterTableDepth=10; CalculateInfiltration=true; CalculateDrainage=true; ReportDetail=false; IncludeSorption=true; CalculateEvaporation=false; CalculateDiffusion=false; DiffusivityMultiplier=1; ExtractionMultiplier=0; ProfileWaterExtraction=0; TotalCover=0; ResidueWater=0; Hour=0; ReportLayer=0; TimeStep=0
          CompositeFactor Sand: Specifications=[WEIRDO]
            WEIRDO: PrecipitationInterception=0; Depth=[0-1400]; Salb=0.15; Thickness=[1400]; CFlow=[0.1]; XFlow=[4.1]; PsiBub=[-20]; MinRepellancyFactor=[1]; LowerRepellentWC=[0.2]; UpperRepellentWC=[0.8]; SubProfileConductance=100; WaterTableDepth=10; CalculateInfiltration=true; CalculateDrainage=true; ReportDetail=false; IncludeSorption=true; CalculateEvaporation=false; CalculateDiffusion=false; DiffusivityMultiplier=1; ExtractionMultiplier=0; ProfileWaterExtraction=0; TotalCover=0; ResidueWater=0; Hour=0; ReportLayer=0; TimeStep=0
          CompositeFactor Loam: Specifications=[WEIRDO]
            WEIRDO: PrecipitationInterception=0; Depth=[0-1400]; Salb=0.15; Thickness=[1400]; CFlow=[0.09]; XFlow=[3]; PsiBub=[-20]; MinRepellancyFactor=[1]; LowerRepellentWC=[0.2]; UpperRepellentWC=[0.8]; SubProfileConductance=100; WaterTableDepth=10; CalculateInfiltration=true; CalculateDrainage=true; ReportDetail=false; IncludeSorption=true; CalculateEvaporation=false; CalculateDiffusion=false; DiffusivityMultiplier=1; ExtractionMultiplier=0; ProfileWaterExtraction=0; TotalCover=0; ResidueWater=0; Hour=0; ReportLayer=0; TimeStep=0
      Simulation BaseDrain
        Clock: Start=1999-01-01; End=1999-12-31
        Weather: FileName=lincoln.met
        Summary SummaryFile
        Zone Field: Area=1; Slope=0; AspectAngle=0; Altitude=50
          Fertiliser
          SurfaceOrganicMatter: InitialResidueName=wheat_stubble; InitialResidueType=wheat; InitialResidueMass=0; InitialStandingFraction=0; InitialCPR=0; InitialCNR=100
          MicroClimate: a_interception=0; b_interception=1; c_interception=0; d_interception=0; SoilHeatFluxFraction=0.4; MinimumHeightDiffForNewLayer=0; NightInterceptionFraction=0.5; ReferenceHeight=2
          Irrigation
          Manager ClimateControl: same as Sensibility.Diffusion.BaseDiffuse.Field.ClimateControl
          Soil: ASCOrder=Vertosol; ASCSubOrder=Black; SoilType=Clay; Site=Norwin; NearestTown=Norwin; Region=Darling Downs and Granite Belt; State=Queensland; Country=Australia; NaturalVegetation=Qld. Bluegrass, possible Qld. Blue gum; ApsoilNumber=900; Latitude=-27.581836; Longitude=151.320206; LocationAccuracy=+/- 20m
            DataSource=CSIRO Sustainable Ecosystems, Toowoomba; Characteriesd as part of the GRDC funded project"Doing it better, doing it smarter, managing soil water in Australian agriculture' 2011
            Comments=OC, CLL for all crops estimated-based on Bongeen Mywybilla Soil No1
            WEIRDO: PrecipitationInterception=0; Salb=0.15; SubProfileConductance=20; WaterTableDepth=10; CalculateInfiltration=false; CalculateDrainage=true; ReportDetail=false; IncludeSorption=true; CalculateEvaporation=false; CalculateDiffusion=false; DiffusivityMultiplier=2; ExtractionMultiplier=0; ProfileWaterExtraction=0; TotalCover=0; ResidueWater=0; Hour=0; ReportLayer=0; TimeStep=0
            Evapotranspiration
            MRSpline
            Nutrient
            Organic: same as Validation.Residues.Base.Field.Soil.Organic
            Chemical: Thickness=[200, 200, 200, 200, 200, 200, 200]; PH=[6, 6, 6, 6, 6, 6, 6]; PHUnits=Water
            Water: Thickness=[1600]; InitialValues=[0.44]; InitialPAWmm=464; RelativeTo=LL15; FilledFromTop=false
            OutputLayers: Thickness=[200, 200, 200, 200, 200, 200, 200]
            LayerStructure
              Thickness=[50, 50, 50, 50, 50, 50, 50, 50, 50, 50, 50, 50, 50, 50, 50, 50, 50, 50, 50, 50, 50, 50, 50, 50, 50, 50, 50, 50]
            CERESSoilTemperature Temperature
            Physical: Thickness=[1400]; BD=[1]; LL15=[0.15]; DUL=[0.3]; SAT=[0.44]
            Solute NO3: same as Validation.Residues.Base.Field.Soil.NO3
            Solute NH4: same as Validation.Residues.Base.Field.Soil.NH4
            Solute Urea: same as Validation.Residues.Base.Field.Soil.Urea
          Report ReportWaterLayers: EventNames=[Clock].DoReport
          Report ReportWaterBalance: EventNames=[Clock].DoReport
          Report ReporAllLayers: EventNames=[Clock].DoReport
            VariableNames:
              [Soil].WEIRDO.SW
              [Clock].Today
    Experiment Repellency
      Factors
        Factor Repellency
          CompositeFactor High: Specifications=[WEIRDO]
            WEIRDO: PrecipitationInterception=0; Depth=[0-1400]; Salb=0.15; Thickness=[1400]; CFlow=[0.9]; XFlow=[3.5]; PsiBub=[-20]; MinRepellancyFactor=[0]; LowerRepellentWC=[0.5]; UpperRepellentWC=[0.8]; SubProfileConductance=100; WaterTableDepth=10; CalculateInfiltration=true; CalculateDrainage=true; ReportDetail=false; IncludeSorption=true; CalculateEvaporation=false; CalculateDiffusion=false; DiffusivityMultiplier=1; ExtractionMultiplier=0; ProfileWaterExtraction=0; TotalCover=0; ResidueWater=0; Hour=0; ReportLayer=0; TimeStep=0
          CompositeFactor Moderate: Specifications=[WEIRDO]
            WEIRDO: PrecipitationInterception=0; Depth=[0-1400]; Salb=0.15; Thickness=[1400]; CFlow=[0.9]; XFlow=[3.5]; PsiBub=[-20]; MinRepellancyFactor=[0.1]; LowerRepellentWC=[0.5]; UpperRepellentWC=[0.8]; SubProfileConductance=100; WaterTableDepth=8; CalculateInfiltration=true; CalculateDrainage=true; ReportDetail=false; IncludeSorption=true; CalculateEvaporation=false; CalculateDiffusion=false; DiffusivityMultiplier=1; ExtractionMultiplier=0; ProfileWaterExtraction=0; TotalCover=0; ResidueWater=0; Hour=0; ReportLayer=0; TimeStep=0
          CompositeFactor None: Specifications=[WEIRDO]
            WEIRDO: PrecipitationInterception=0; Depth=[0-1400]; Salb=0.15; Thickness=[1400]; CFlow=[0.9]; XFlow=[3.5]; PsiBub=[-20]; MinRepellancyFactor=[1]; LowerRepellentWC=[0.5]; UpperRepellentWC=[0.8]; SubProfileConductance=100; WaterTableDepth=8; CalculateInfiltration=true; CalculateDrainage=true; ReportDetail=false; IncludeSorption=true; CalculateEvaporation=false; CalculateDiffusion=false; DiffusivityMultiplier=1; ExtractionMultiplier=0; ProfileWaterExtraction=0; TotalCover=0; ResidueWater=0; Hour=0; ReportLayer=0; TimeStep=0
      Simulation BaseRepell
        Clock: Start=1999-01-01; End=1999-08-30
        Weather: FileName=lincoln.met
        Summary SummaryFile
        Zone Field: Area=1; Slope=0; AspectAngle=0; Altitude=50
          Soil: ASCOrder=Vertosol; ASCSubOrder=Black; SoilType=Clay; Site=Norwin; NearestTown=Norwin; Region=Darling Downs and Granite Belt; State=Queensland; Country=Australia; NaturalVegetation=Qld. Bluegrass, possible Qld. Blue gum; ApsoilNumber=900; Latitude=-27.581836; Longitude=151.320206; LocationAccuracy=+/- 20m
            DataSource=CSIRO Sustainable Ecosystems, Toowoomba; Characteriesd as part of the GRDC funded project"Doing it better, doing it smarter, managing soil water in Australian agriculture' 2011
            Comments=OC, CLL for all crops estimated-based on Bongeen Mywybilla Soil No1
            WEIRDO: PrecipitationInterception=0; Salb=0.15; SubProfileConductance=20; WaterTableDepth=10; CalculateInfiltration=true; CalculateDrainage=true; ReportDetail=false; IncludeSorption=true; CalculateEvaporation=true; CalculateDiffusion=true; DiffusivityMultiplier=2; ExtractionMultiplier=0; ProfileWaterExtraction=0; TotalCover=0; ResidueWater=0; Hour=0; ReportLayer=0; TimeStep=0
            Evapotranspiration
            MRSpline
            Nutrient
            Organic: same as Validation.Residues.Base.Field.Soil.Organic
            Chemical: Thickness=[200, 200, 200, 200, 200, 200, 200]; PH=[6, 6, 6, 6, 6, 6, 6]; PHUnits=Water
            Water: Thickness=[1600]; InitialValues=[0.15]; InitialPAWmm=0; RelativeTo=LL15; FilledFromTop=false
            LayerStructure
              Thickness=[50, 50, 50, 50, 50, 50, 50, 50, 50, 50, 50, 50, 50, 50, 50, 50, 50, 50, 50, 50, 50, 50, 50, 50, 50, 50, 50, 50]
            OutputLayers: Thickness=[200, 200, 200, 200, 200, 200, 200]
            CERESSoilTemperature Temperature
            Physical: same as Sensibility.Drainage.BaseDrain.Field.Soil.Physical
            Solute NO3: same as Validation.Residues.Base.Field.Soil.NO3
            Solute NH4: same as Validation.Residues.Base.Field.Soil.NH4
            Solute Urea: same as Validation.Residues.Base.Field.Soil.Urea
          Fertiliser
          SurfaceOrganicMatter: InitialResidueName=wheat_stubble; InitialResidueType=wheat; InitialResidueMass=0; InitialStandingFraction=0; InitialCPR=0; InitialCNR=100
          MicroClimate: a_interception=0; b_interception=1; c_interception=0; d_interception=0; SoilHeatFluxFraction=0.4; MinimumHeightDiffForNewLayer=0; NightInterceptionFraction=0.5; ReferenceHeight=2
          Irrigation
          Manager ClimateControl
```csharp
using Models.Soils;
using System.Xml.Serialization;
using Models;
using Models.PMF;
using System.Text;
using System.Collections.Generic;
using APSIM.Shared.Utilities;
using Models.Core;
using System;
using Models.Climate;

namespace Models
{
    [Serializable] 
    [System.Xml.Serialization.XmlInclude(typeof(Model))]
    public class Script : Model
    {
        [Link] Weather Met;
        [Link] Clock Clock;
    
        [EventSubscribe("PreparingNewWeatherData")]
        private void OnPreparingNewWeatherData(object sender, EventArgs e)
        {
            Met.Rain = 0;    
            Met.MaxT = 0;
            Met.MinT = 0;
            Met.Radn = 0;
            Met.VP = 1;
            Met.Wind = 0;
        }
    }
}
```
          Manager Irrigate weekly
            IrrigateDate = 1-feb
            Amount = 30
            Depth = 0
            Efficiency = 1
            WillRunoff = False
            Duration = 0.5
            DaysSinceIrrigation = 0
```csharp
using Models.Soils;
using System;
using Models.Core;
using Models.PMF;
using APSIM.Shared.Utilities;
namespace Models
{
    [Serializable]
    public class Script : Model
    {
        [Link] Clock Clock;
        [Link] Irrigation Irrigation;
        
        [Description("Date to irrigate")]
        public string IrrigateDate { get; set; }
        
        [Description("Amount of irrigation to be applied (mm)")]
        public double Amount { get; set; }
        
        [Description("Depth of irrigation (mm)")]
        public double Depth { get; set; }
        
        [Description("Efficiency of irrigation (0-1)")]
        public double Efficiency { get; set; }
        
        [Description("Will the irrigation runoff?")]
        public bool WillRunoff { get; set; }
        
        [Description("How may hours did it take to apply irrigation?")]
        public double Duration { get; set; }
        
        public int DaysSinceIrrigation { get; set; }
        [EventSubscribe("DoManagement")]
        private void OnDoManagement(object sender, EventArgs e)
        {
            DaysSinceIrrigation += 1;
            if (DaysSinceIrrigation >= 7)
            {
                Irrigation.Apply(amount: Amount, depth: Depth, efficiency: Efficiency, willRunoff: WillRunoff, duration: Duration);
                DaysSinceIrrigation = 0;
            }
        }
    }
}
```
          Report ReportWaterLayers: EventNames=[Clock].DoReport
          Report ReportWaterBalance: EventNames=[Clock].DoReport
          Report: EventNames=[Clock].DoReport
            VariableNames:
              [Clock].Today
              [WEIRDO].SW
          Report ReporAllLayers: EventNames=[Clock].DoReport
            VariableNames:
              [Soil].WEIRDO.SW
              [Clock].Today
    Experiment Rewetting
      Factors
        Factor Texture
          CompositeFactor Silt: Specifications=[WEIRDO]
            WEIRDO: PrecipitationInterception=0; Depth=[0-1400]; Salb=0.15; Thickness=[1400]; CFlow=[0.9]; XFlow=[3.5]; PsiBub=[-20]; MinRepellancyFactor=[1]; LowerRepellentWC=[0.2]; UpperRepellentWC=[0.8]; SubProfileConductance=100; WaterTableDepth=10; CalculateInfiltration=true; CalculateDrainage=true; ReportDetail=false; IncludeSorption=true; CalculateEvaporation=false; CalculateDiffusion=false; DiffusivityMultiplier=1; ExtractionMultiplier=10; ProfileWaterExtraction=0; TotalCover=0; ResidueWater=0; Hour=0; ReportLayer=0; TimeStep=0
          CompositeFactor Sand: Specifications=[WEIRDO]
            WEIRDO: PrecipitationInterception=0; Depth=[0-1400]; Salb=0.15; Thickness=[1400]; CFlow=[0.1]; XFlow=[4.1]; PsiBub=[-20]; MinRepellancyFactor=[1]; LowerRepellentWC=[0.2]; UpperRepellentWC=[0.8]; SubProfileConductance=100; WaterTableDepth=10; CalculateInfiltration=true; CalculateDrainage=true; ReportDetail=false; IncludeSorption=true; CalculateEvaporation=false; CalculateDiffusion=false; DiffusivityMultiplier=1; ExtractionMultiplier=10; ProfileWaterExtraction=0; TotalCover=0; ResidueWater=0; Hour=0; ReportLayer=0; TimeStep=0
          CompositeFactor Loam: Specifications=[WEIRDO]
            WEIRDO: PrecipitationInterception=0; Depth=[0-1400]; Salb=0.15; Thickness=[1400]; CFlow=[0.09]; XFlow=[3]; PsiBub=[-20]; MinRepellancyFactor=[1]; LowerRepellentWC=[0.2]; UpperRepellentWC=[0.8]; SubProfileConductance=100; WaterTableDepth=10; CalculateInfiltration=true; CalculateDrainage=true; ReportDetail=false; IncludeSorption=true; CalculateEvaporation=false; CalculateDiffusion=false; DiffusivityMultiplier=1; ExtractionMultiplier=10; ProfileWaterExtraction=0; TotalCover=0; ResidueWater=0; Hour=0; ReportLayer=0; TimeStep=0
      Simulation BaseRewet
        Clock: Start=1999-02-01; End=1999-03-01
        Weather: FileName=lincoln.met
        Summary SummaryFile
        Zone Field: Area=1; Slope=0; AspectAngle=0; Altitude=50
          Fertiliser
          SurfaceOrganicMatter: InitialResidueName=wheat_stubble; InitialResidueType=wheat; InitialResidueMass=0; InitialStandingFraction=0; InitialCPR=0; InitialCNR=100
          MicroClimate: a_interception=0; b_interception=1; c_interception=0; d_interception=0; SoilHeatFluxFraction=0.4; MinimumHeightDiffForNewLayer=0; NightInterceptionFraction=0.5; ReferenceHeight=2
          Irrigation
          Manager ClimateControl: same as Sensibility.Repellency.BaseRepell.Field.ClimateControl
          Manager Irrigate on a fixed date
            IrrigateDate = 15-feb
            Amount = 30
            Depth = 0
            Efficiency = 1
            WillRunoff = False
            Duration = 0.5
```csharp
using Models.Soils;
using System;
using Models.Core;
using Models.PMF;
using APSIM.Shared.Utilities;
namespace Models
{
    [Serializable]
    public class Script : Model
    {
        [Link] Clock Clock;
        [Link] Irrigation Irrigation;
        
        [Description("Date to irrigate")]
        public string IrrigateDate { get; set; }
        
        [Description("Amount of irrigation to be applied (mm)")]
        public double Amount { get; set; }
        
        [Description("Depth of irrigation (mm)")]
        public double Depth { get; set; }
        
        [Description("Efficiency of irrigation (0-1)")]
        public double Efficiency { get; set; }
        
        [Description("Will the irrigation runoff?")]
        public bool WillRunoff { get; set; }
        
        [Description("How may hours did it take to apply irrigation?")]
        public double Duration { get; set; }
        
        
        [EventSubscribe("DoManagement")]
        private void OnDoManagement(object sender, EventArgs e)
        {
            if (DateUtilities.WithinDates(IrrigateDate, Clock.Today, IrrigateDate))
            {
                Irrigation.Apply(amount: Amount, depth: Depth, efficiency: Efficiency, willRunoff: WillRunoff, duration: Duration);
            }
        }
    }
}
```
          Soil: ASCOrder=Vertosol; ASCSubOrder=Black; SoilType=Clay; Site=Norwin; NearestTown=Norwin; Region=Darling Downs and Granite Belt; State=Queensland; Country=Australia; NaturalVegetation=Qld. Bluegrass, possible Qld. Blue gum; ApsoilNumber=900; Latitude=-27.581836; Longitude=151.320206; LocationAccuracy=+/- 20m
            DataSource=CSIRO Sustainable Ecosystems, Toowoomba; Characteriesd as part of the GRDC funded project"Doing it better, doing it smarter, managing soil water in Australian agriculture' 2011
            Comments=OC, CLL for all crops estimated-based on Bongeen Mywybilla Soil No1
            WEIRDO: PrecipitationInterception=0; Salb=0.15; SubProfileConductance=20; WaterTableDepth=10; CalculateInfiltration=true; CalculateDrainage=true; ReportDetail=false; IncludeSorption=true; CalculateEvaporation=true; CalculateDiffusion=true; DiffusivityMultiplier=2; ExtractionMultiplier=10; ProfileWaterExtraction=0; TotalCover=0; ResidueWater=0; Hour=0; ReportLayer=0; TimeStep=0
              Thickness  CFlow  XFlow  PsiBub  MinRepellancyFactor  LowerRepellentWC  UpperRepellentWC
              30         7e-11  3      -20     1                    0.2               0.8
              170        7e-11  3      -20     1                    0.2               0.8
              200        7e-11  3      -70     1                    0.2               0.8
              200        7e-11  3      -70     1                    0.2               0.8
              200        7e-11  3      -70     1                    0.2               0.8
              200        7e-11  3      -70     1                    0.2               0.8
              200        7e-11  3      -70     1                    0.2               0.8
              200        7e-11  3      -70     1                    0.2               0.8
            Evapotranspiration
            MRSpline
            Nutrient
            Organic: same as Validation.Residues.Base.Field.Soil.Organic
            Chemical: Thickness=[200, 200, 200, 200, 200, 200, 200]; PH=[6, 6, 6, 6, 6, 6, 6]; PHUnits=Water
            Water: Thickness=[30, 170, 200]; InitialValues=[0.16, 0.15, 0.14]; InitialPAWmm=0; RelativeTo=LL15; FilledFromTop=false
            LayerStructure
              Thickness=[50, 50, 50, 50, 50, 50, 50, 50, 50, 50, 50, 50, 50, 50, 50, 50, 50, 50, 50, 50, 50, 50, 50, 50, 50, 50, 50, 50]
            OutputLayers: Thickness=[200, 200, 200, 200, 200, 200, 200]
            CERESSoilTemperature Temperature
            Physical
              Thickness  BD   LL15  DUL   SAT
              30         1    0.16  0.3   0.44
              170        1    0.15  0.3   0.44
              200        1.2  0.14  0.28  0.46
              200        1.2  0.14  0.28  0.46
              200        1.3  0.14  0.26  0.36
              200        1.4  0.14  0.26  0.36
              200        1.5  0.14  0.26  0.36
              200        1.6  0.14  0.26  0.36
            Solute NO3: same as Validation.Residues.Base.Field.Soil.NO3
            Solute NH4: same as Validation.Residues.Base.Field.Soil.NH4
            Solute Urea: same as Validation.Residues.Base.Field.Soil.Urea
          Report ReportWaterLayers: EventNames=[Clock].DoReport
          Report ReportWaterBalance: EventNames=[Clock].DoReport
          Report: EventNames=[Clock].DoReport
            VariableNames:
              [Clock].Today
              [WEIRDO].SW
          Report ReporAllLayers: EventNames=[Clock].DoReport
            VariableNames:
              [Soil].WEIRDO.SW
              [Clock].Today
    Experiment Evaporation
      Factors
        Factor IntitialWater
          CompositeFactor Moist
            Specifications:
              [Water].Thickness=1400
              [Water].InitialValues=0.3
          CompositeFactor Dryer
            Specifications:
              [Water].Thickness=1400
              [Water].InitialValues=0.24
          CompositeFactor DryerStill
            Specifications:
              [Water].Thickness=1400
              [Water].InitialValues=0.18
      Simulation BaseEvap
        Clock: Start=1999-01-01; End=1999-12-31
        Weather: FileName=lincoln.met
        Summary SummaryFile
        Zone Field: Area=1; Slope=0; AspectAngle=0; Altitude=50
          Fertiliser
          SurfaceOrganicMatter: InitialResidueName=wheat_stubble; InitialResidueType=wheat; InitialResidueMass=0; InitialStandingFraction=0; InitialCPR=0; InitialCNR=100
          MicroClimate: a_interception=0; b_interception=1; c_interception=0; d_interception=0; SoilHeatFluxFraction=0.4; MinimumHeightDiffForNewLayer=0; NightInterceptionFraction=0.5; ReferenceHeight=2
          Irrigation
          Manager ClimateControl
```csharp
using Models.Soils;
using System.Xml.Serialization;
using Models;
using Models.PMF;
using System.Text;
using System.Collections.Generic;
using APSIM.Shared.Utilities;
using Models.Core;
using System;
using Models.Climate;

namespace Models
{
    [Serializable] 
    [System.Xml.Serialization.XmlInclude(typeof(Model))]
    public class Script : Model
    {
        [Link] Weather Met;
        [Link] Clock Clock;
    
        [EventSubscribe("PreparingNewWeatherData")]
        private void OnPreparingNewWeatherData(object sender, EventArgs e)
        {
            Met.Rain = 0;    
            Met.MaxT = 15;
            Met.MinT = 5;
            Met.Radn = 7;
            Met.VP = .4;
            Met.Wind = 1;
        }
    }
}
```
          Soil: ASCOrder=Vertosol; ASCSubOrder=Black; SoilType=Clay; Site=Norwin; NearestTown=Norwin; Region=Darling Downs and Granite Belt; State=Queensland; Country=Australia; NaturalVegetation=Qld. Bluegrass, possible Qld. Blue gum; ApsoilNumber=900; Latitude=-27.581836; Longitude=151.320206; LocationAccuracy=+/- 20m
            DataSource=CSIRO Sustainable Ecosystems, Toowoomba; Characteriesd as part of the GRDC funded project"Doing it better, doing it smarter, managing soil water in Australian agriculture' 2011
            Comments=OC, CLL for all crops estimated-based on Bongeen Mywybilla Soil No1
            WEIRDO: PrecipitationInterception=0; Depth=[0-1400]; Salb=0.15; Thickness=[1400]; CFlow=[0.9]; XFlow=[3.5]; PsiBub=[-20]; MinRepellancyFactor=[1]; LowerRepellentWC=[0.2]; UpperRepellentWC=[0.8]; SubProfileConductance=20; WaterTableDepth=3; CalculateInfiltration=true; CalculateDrainage=true; ReportDetail=false; IncludeSorption=true; CalculateEvaporation=true; CalculateDiffusion=true; DiffusivityMultiplier=1; ExtractionMultiplier=0; ProfileWaterExtraction=0; TotalCover=0; ResidueWater=0; Hour=0; ReportLayer=0; TimeStep=0
            Evapotranspiration
            MRSpline
            Nutrient
            Organic: same as Validation.Residues.Base.Field.Soil.Organic
            Chemical: Thickness=[200, 200, 200, 200, 200, 200, 200]; PH=[6, 6, 6, 6, 6, 6, 6]; PHUnits=Water
            LayerStructure
              Thickness=[25, 25, 50, 50, 50, 50, 50, 50, 50, 50, 50, 50, 50, 50, 50, 50, 50, 50, 50, 50, 50, 50, 50, 50, 50, 50, 50, 50, 50]
            OutputLayers: Thickness=[200, 200, 200, 200, 200, 200, 200]
            CERESSoilTemperature Temperature
            Physical: same as Sensibility.Drainage.BaseDrain.Field.Soil.Physical
            Solute NO3: same as Validation.Residues.Base.Field.Soil.NO3
            Solute NH4: same as Validation.Residues.Base.Field.Soil.NH4
            Solute Urea: same as Validation.Residues.Base.Field.Soil.Urea
            Water: Thickness=[1400]; InitialPAWmm=0; RelativeTo=LL15; FilledFromTop=false
          Report ReportWaterLayers: EventNames=[Clock].DoReport
          Report ReportWaterBalance: EventNames=[Clock].DoReport
          Report ReportMetVariables: EventNames=[Clock].DoReport
          Report ReporAllLayers: EventNames=[Clock].DoReport
            VariableNames:
              [Soil].WEIRDO.SW
              [Clock].Today
    Experiment Irrigation
      Factors
        Factor IrrigDuration
          Specification=[Irrigate on a fixed date].Script.Duration = 0.1,0.3,0.7,1,2,6
      Simulation BaseIrrigation
        Clock: Start=1999-01-01; End=1999-03-31
        Weather: FileName=lincoln.met
        Summary SummaryFile
        Zone Field: Area=1; Slope=0; AspectAngle=0; Altitude=50
          Report ReportWaterLayers: EventNames=[Clock].DoReport
          Report ReportWaterBalance: EventNames=[Clock].DoReport
          Fertiliser
          SurfaceOrganicMatter: InitialResidueName=wheat_stubble; InitialResidueType=wheat; InitialResidueMass=0; InitialStandingFraction=0; InitialCPR=0; InitialCNR=100
          MicroClimate: a_interception=0; b_interception=1; c_interception=0; d_interception=0; SoilHeatFluxFraction=0.4; MinimumHeightDiffForNewLayer=0; NightInterceptionFraction=0.5; ReferenceHeight=2
          Irrigation
          Manager Irrigate on a fixed date
            IrrigateDate = 1-feb
            Amount = 10
            Depth = 0
            Efficiency = 1
            WillRunoff = False
            Duration = 0.5
            script: same as in Sensibility.Rewetting.BaseRewet.Field.Irrigate on a fixed date
          Soil: ASCOrder=Vertosol; ASCSubOrder=Black; SoilType=Clay; Site=Norwin; NearestTown=Norwin; Region=Darling Downs and Granite Belt; State=Queensland; Country=Australia; NaturalVegetation=Qld. Bluegrass, possible Qld. Blue gum; ApsoilNumber=900; Latitude=-27.581836; Longitude=151.320206; LocationAccuracy=+/- 20m
            DataSource=CSIRO Sustainable Ecosystems, Toowoomba; Characteriesd as part of the GRDC funded project"Doing it better, doing it smarter, managing soil water in Australian agriculture' 2011
            Comments=OC, CLL for all crops estimated-based on Bongeen Mywybilla Soil No1
            WEIRDO: PrecipitationInterception=0; Depth=[0-1400]; Salb=0.15; Thickness=[1400]; CFlow=[0.9]; XFlow=[3.5]; PsiBub=[-20]; MinRepellancyFactor=[0.1]; LowerRepellentWC=[0.5]; UpperRepellentWC=[0.8]; SubProfileConductance=20; WaterTableDepth=10; CalculateInfiltration=true; CalculateDrainage=true; ReportDetail=false; IncludeSorption=true; CalculateEvaporation=false; CalculateDiffusion=false; DiffusivityMultiplier=1; ExtractionMultiplier=0; ProfileWaterExtraction=0; TotalCover=0; ResidueWater=0; Hour=0; ReportLayer=0; TimeStep=0
            Evapotranspiration
            MRSpline
            Nutrient
            Organic: same as Validation.Residues.Base.Field.Soil.Organic
            Chemical: Thickness=[200, 200, 200, 200, 200, 200, 200]; PH=[6, 6, 6, 6, 6, 6, 6]; PHUnits=Water
            Water: Thickness=[1400]; InitialValues=[0.2]; InitialPAWmm=70; RelativeTo=LL15; FilledFromTop=false
            LayerStructure
              Thickness=[25, 25, 50, 50, 50, 50, 50, 50, 50, 50, 50, 50, 50, 50, 50, 50, 50, 50, 50, 50, 50, 50, 50, 50, 50, 50, 50, 50, 50]
            OutputLayers: Thickness=[200, 200, 200, 200, 200, 200, 200]
            CERESSoilTemperature Temperature
            Physical: same as Sensibility.Drainage.BaseDrain.Field.Soil.Physical
            Solute NO3: same as Validation.Residues.Base.Field.Soil.NO3
            Solute NH4: same as Validation.Residues.Base.Field.Soil.NH4
            Solute Urea: same as Validation.Residues.Base.Field.Soil.Urea
          Manager ClimateControl: same as Sensibility.Repellency.BaseRepell.Field.ClimateControl
    Experiment Infiltration
      Factors
        Permutation
          Factor ItitialWater
            CompositeFactor Sat
              Specifications:
                [Water].Thickness=1400
                [Water].InitialValues=0.44
            CompositeFactor LL
              Specifications:
                [Water].Thickness=1400
                [Water].InitialValues=0.15
          Factor MacroPores
            CompositeFactor Many: Specifications=[WEIRDO]
              WEIRDO: PrecipitationInterception=0; Depth=[0-1400]; Salb=0.15; Thickness=[1400]; CFlow=[0.9]; XFlow=[3.5]; PsiBub=[-20]; MinRepellancyFactor=[1]; LowerRepellentWC=[0.2]; UpperRepellentWC=[0.8]; SubProfileConductance=20; WaterTableDepth=10; CalculateInfiltration=true; CalculateDrainage=true; ReportDetail=false; IncludeSorption=true; CalculateEvaporation=true; CalculateDiffusion=true; DiffusivityMultiplier=1; ExtractionMultiplier=10; ProfileWaterExtraction=0; TotalCover=0; ResidueWater=0; Hour=0; ReportLayer=0; TimeStep=0
            CompositeFactor Few: same as Sensibility.Infiltration.Factors.Permutation.MacroPores.Many
            CompositeFactor None: same as Sensibility.Infiltration.Factors.Permutation.MacroPores.Many
      Simulation BaseSoil
        Clock: Start=1999-01-01; End=1999-12-31
        Weather: FileName=lincoln.met
        Summary SummaryFile
        Zone Field: Area=1; Slope=0; AspectAngle=0; Altitude=50
          Soil: ASCOrder=Vertosol; ASCSubOrder=Black; SoilType=Clay; Site=Norwin; NearestTown=Norwin; Region=Darling Downs and Granite Belt; State=Queensland; Country=Australia; NaturalVegetation=Qld. Bluegrass, possible Qld. Blue gum; ApsoilNumber=900; Latitude=-27.581836; Longitude=151.320206; LocationAccuracy=+/- 20m
            DataSource=CSIRO Sustainable Ecosystems, Toowoomba; Characteriesd as part of the GRDC funded project"Doing it better, doing it smarter, managing soil water in Australian agriculture' 2011
            Comments=OC, CLL for all crops estimated-based on Bongeen Mywybilla Soil No1
            WEIRDO: PrecipitationInterception=0; Salb=0.15; SubProfileConductance=20; WaterTableDepth=10; CalculateInfiltration=true; CalculateDrainage=true; ReportDetail=false; IncludeSorption=true; CalculateEvaporation=false; CalculateDiffusion=false; DiffusivityMultiplier=2; ExtractionMultiplier=0; ProfileWaterExtraction=0; TotalCover=0; ResidueWater=0; Hour=0; ReportLayer=0; TimeStep=0
            Evapotranspiration
            MRSpline
            Nutrient
            Organic: same as Validation.Residues.Base.Field.Soil.Organic
            Chemical: Thickness=[200, 200, 200, 200, 200, 200, 200]; PH=[6, 6, 6, 6, 6, 6, 6]; PHUnits=Water
            LayerStructure
              Thickness=[25, 25, 50, 50, 50, 50, 50, 50, 50, 50, 50, 50, 50, 50, 50, 50, 50, 50, 50, 50, 50, 50, 50, 50, 50, 50, 50, 50, 50]
            OutputLayers: Thickness=[200, 200, 200, 200, 200, 200, 200]
            CERESSoilTemperature Temperature
            Physical: same as Sensibility.Drainage.BaseDrain.Field.Soil.Physical
            Solute NO3: same as Validation.Residues.Base.Field.Soil.NO3
            Solute NH4: same as Validation.Residues.Base.Field.Soil.NH4
            Solute Urea: same as Validation.Residues.Base.Field.Soil.Urea
            Water: Thickness=[1400]; InitialPAWmm=0; RelativeTo=LL15; FilledFromTop=false
          Report ReportWaterLayers: EventNames=[Clock].DoReport
          Report ReportWaterBalance: EventNames=[Clock].DoReport
          Fertiliser
          SurfaceOrganicMatter: InitialResidueName=wheat_stubble; InitialResidueType=wheat; InitialResidueMass=0; InitialStandingFraction=0; InitialCPR=0; InitialCNR=100
          MicroClimate: a_interception=0; b_interception=1; c_interception=0; d_interception=0; SoilHeatFluxFraction=0.4; MinimumHeightDiffForNewLayer=0; NightInterceptionFraction=0.5; ReferenceHeight=2
          Irrigation
          Manager Irrigate on a fixed date
            IrrigateDate = 1-feb
            Amount = 50
            Depth = 0
            Efficiency = 1
            WillRunoff = False
            Duration = 2
            script: same as in Sensibility.Rewetting.BaseRewet.Field.Irrigate on a fixed date
    Experiment Layering
      Factors
        Factor Thickness
          CompositeFactor 50mm: Specifications=[LayerStructure]
            LayerStructure
              Thickness=[50, 50, 50, 50, 50, 50, 50, 50, 50, 50, 50, 50, 50, 50, 50, 50, 50, 50, 50, 50, 50, 50, 50, 50, 50, 50, 50, 50]
          CompositeFactor 100mm: Specifications=[LayerStructure]
            LayerStructure
              Thickness=[100, 100, 100, 100, 100, 100, 100, 100, 100, 100, 100, 100, 100, 100]
          CompositeFactor 200mm: Specifications=[LayerStructure]
            LayerStructure: Thickness=[200, 200, 200, 200, 200, 200, 200]
      Simulation BaseLayer
        Clock: Start=1999-01-01; End=1999-12-31
        Weather: FileName=lincoln.met
        Summary SummaryFile
        Zone Field: Area=1; Slope=0; AspectAngle=0; Altitude=50
          Fertiliser
          SurfaceOrganicMatter: InitialResidueName=wheat_stubble; InitialResidueType=wheat; InitialResidueMass=0; InitialStandingFraction=0; InitialCPR=0; InitialCNR=100
          MicroClimate: a_interception=0; b_interception=1; c_interception=0; d_interception=0; SoilHeatFluxFraction=0.4; MinimumHeightDiffForNewLayer=0; NightInterceptionFraction=0.5; ReferenceHeight=2
          Irrigation
          Manager ClimateControl: same as Sensibility.Diffusion.BaseDiffuse.Field.ClimateControl
          Soil: ASCOrder=Vertosol; ASCSubOrder=Black; SoilType=Clay; Site=Norwin; NearestTown=Norwin; Region=Darling Downs and Granite Belt; State=Queensland; Country=Australia; NaturalVegetation=Qld. Bluegrass, possible Qld. Blue gum; ApsoilNumber=900; Latitude=-27.581836; Longitude=151.320206; LocationAccuracy=+/- 20m
            DataSource=CSIRO Sustainable Ecosystems, Toowoomba; Characteriesd as part of the GRDC funded project"Doing it better, doing it smarter, managing soil water in Australian agriculture' 2011
            Comments=OC, CLL for all crops estimated-based on Bongeen Mywybilla Soil No1
            WEIRDO: PrecipitationInterception=0; Salb=0.15; SubProfileConductance=20; WaterTableDepth=10; CalculateInfiltration=true; CalculateDrainage=true; ReportDetail=false; IncludeSorption=true; CalculateEvaporation=true; CalculateDiffusion=true; DiffusivityMultiplier=1; ExtractionMultiplier=0; ProfileWaterExtraction=0; TotalCover=0; ResidueWater=0; Hour=0; ReportLayer=0; TimeStep=0
              Thickness  CFlow  XFlow  PsiBub  MinRepellancyFactor  LowerRepellentWC  UpperRepellentWC
              200        0.6    3      -20     1                    0.2               0.8
              200        0.6    3      -20     1                    0.2               0.8
              200        0.6    3      -20     1                    0.2               0.8
              200        0.6    3      -20     1                    0.2               0.8
              200        0.6    3      -20     1                    0.2               0.8
              200        0.6    3      -20     1                    0.2               0.8
              200        0.6    3      -20     1                    0.2               0.8
            Evapotranspiration
            MRSpline
            Nutrient
            Organic: same as Validation.Residues.Base.Field.Soil.Organic
            Chemical: Thickness=[200, 200, 200, 200, 200, 200, 200]; PH=[6, 6, 6, 6, 6, 6, 6]; PHUnits=Water
            Water: Thickness=[200, 200, 200, 200, 200, 200, 200]; InitialValues=[0.44, 0.46, 0.46, 0.36, 0.36, 0.36, 0.36]; InitialPAWmm=362; RelativeTo=LL15; FilledFromTop=false
            OutputLayers: Thickness=[200, 200, 200, 200, 200, 200, 200, 200]
            LayerStructure
            CERESSoilTemperature Temperature
            Physical
              Thickness  BD   LL15  DUL   SAT
              200        1    0.15  0.3   0.44
              200        1.2  0.14  0.28  0.46
              200        1.2  0.14  0.28  0.46
              200        1.3  0.14  0.26  0.36
              200        1.4  0.14  0.26  0.36
              200        1.5  0.14  0.26  0.36
              200        1.6  0.14  0.26  0.36
            Solute NO3: same as Validation.Residues.Base.Field.Soil.NO3
            Solute NH4: same as Validation.Residues.Base.Field.Soil.NH4
            Solute Urea: same as Validation.Residues.Base.Field.Soil.Urea
          Report ReportWaterLayers: EventNames=[Clock].DoReport
          Report ReportWaterBalance: EventNames=[Clock].DoReport
          Report: EventNames=[Clock].DoReport
            VariableNames:
              [Clock].Today
              sum([Soil].OutputLayers.SWmm[1:4]) as TopWater
              sum([Soil].OutputLayers.SWmm[5:8]) as BotWater
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